# 2. Проектирование
# 2.1. Проектирование стабилизатора напряжения
Uвых := 8 V
Iнmax := 400 mA
αmax := 0.12
αmin := 0.1
Uвх.стmin := Uвых + 3 V = 11 V
Uвх.ст.ном := Uвх.стmin/(1 - αmin) = 12.2222 V
Uвх.стmax := Uвх.ст.ном*(1 + αmax) = 13.6889 V
Iвх.стmax := 1.2*Iнmax = 480 mA
# Выбор стабилитрона VD1
Uст.расч := 0.8*Uвых = 6.4 V
Iстmin := 50 mA
Iстmax := 1.15 A = 1150 mA
Pmax := 8 W
# Выбор транзистора VT1
IKVT1maxрасч := Iвх.стmax = 480 mA
UКЭVT1maxрасч := Uвх.стmax - Uвых = 5.68889 V
PVT1maxрасч := (Uвх.стmax - Uвых)*Iвх.стmax = 2.73067 W
